h818 := 20
Imax := 2 A
h814 := 30
UinAC := 22.5 V
Uout := 25 V
Istab := 5 mA
h815 := 30
h819 := 12
UinDC := UinAC*sqrt(2) = 31.8198 V
Ib818 := Imax/h818 = 100 mA
Ib819 := Imax/h819 = 166.667 mA
Ib814 := Ib818/h814 = 3.33333 mA
Ib815 := Ib819/h815 = 5.55556 mA
Rb818 := (UinDC - Uout)/(Ib814 + Istab) = 818.377 Ω
Rb819 := (UinDC - Uout)/(Ib815 + Istab) = 646.087 Ω
Prb818 := (UinDC - Uout)^2/Rb818 = 0.0568317 W
Prb819 := (UinDC - Uout)^2/Rb819 = 0.0719868 W
P818 := 1.3*(UinDC - Uout)*Imax = 17.7315 W
L := 70 mm
R := 7
W := 80 mm
Rh := 14 mm
So := L*W*2 = 112 cm^2
Sr := Rh*W*2 = 22.4 cm^2
S := So + R*Sr = 268.8 cm^2
